π_1 := 0.4
π_2 := 0.45
solve block
    # guess values
    [P_2000; P_1000; P_2010; P_1010; P_2110; P_1110; P_1001; P_2011; P_1011; P_1111; P_2111] := [0; 0; 0; 0; 0; 0; 0; 0; 0; 0; 0; 0]
    # constraints
    P_2010 == P_1001*(1 - π_2)
    P_1010 == P_2010*π_1 + P_2011*π_1*(1 - π_2)
    P_2110 == P_1110*π_1 + P_1010*π_1 + P_1011*π_1*(1 - π_2) + P_1111*π_1*(1 - π_2)
    P_1110 == P_2110*π_1 + P_2111*π_1*(1 - π_2)
    P_1001 == P_2010*(1 - π_1) + P_2011*((1 - π_1)*(1 - π_2) + (1 - π_1)*π_2)
    P_2011 == P_1001*π_2 + P_1010*(1 - π_1) + P_1011*((1 - π_1)*(1 - π_2) + (1 - π_1)*π_2)
    P_1011 == P_2011*π_1*π_2 + P_2110*(1 - π_1) + P_2111*((1 - π_1)*(1 - π_2) + (1 - π_1)*π_2)
    P_2111 == P_1011*π_1*π_2 + P_1110*(1 - π_1) + P_1111*((1 - π_1)*(1 - π_2) + (1 - π_1)*π_2 + π_1*π_2)
    P_2000 + P_1000 + P_2010 + P_1010 + P_2110 + P_1110 + P_1001 + P_2011 + P_1011 + P_1111 + P_2111 == 1
    # solver
    [P_2010; P_1010; P_2110; P_1110; P_1001; P_2011; P_1011; P_2111; P_1111] := find(P_2010, P_1010, P_2110, P_1110, P_1001, P_2011, P_1011, P_2111, P_1111) = [0.114231; 0.0967154; 0.090749; 0.050181; 0.207692; 0.231923; 0.134054; 0.0630971; 0.0113575]
end solve block
A := (1 - π_2)*(P_2011 + P_1001 + P_1011 + P_2111 + P_1111) = 0.356468
L_оч := P_2110 + P_1110 + P_1111 + P_2111 = 0.215385
L_c := P_2010 + P_1010 + P_1001 + 2*(P_2110 + P_1110 + P_2011 + P_1011) + 3*(P_1111 + P_2111) = 1.65582
W_оч := L_оч/((1 - π_1)*(P_2010 + P_1010 + P_2110 + P_1110 + P_2011 + P_1011 + P_1111 + P_2111)) = 0.453074
W_c := W_оч + 1/(1 - π_1) + 1/(1 - π_2) = 3.93792
P_отк1 := (P_2011 + P_1011 + P_2111 + P_1111)*π_2/(P_2010 + P_1010 + P_2110 + P_1110 + P_2011 + P_1011 + P_1111 + P_2111)
P_отк2 := (P_1111 + P_1110)*π_1/(P_1010 + P_1110 + P_1001 + P_1011 + P_1111)
P_отк := P_отк1 + P_отк2 - P_отк1*P_отк2 = 0.287064
Q := 1 - P_отк = 0.712936
K_1 := P_2010 + P_1010 + P_2110 + P_1110 + P_2011 + P_1011 + P_1111 + P_2111 = 0.792308
K_2 := P_2011 + P_1001 + P_1011 + P_2111 + P_1111 = 0.648124
